// COMSOL Multiphysics 6.0.0.405 model "Glass2.mph"
// Outline of the model tree

Common definitions
  mpf1: ParticipationFactors

Geometry
  geom1 "Geometry 1" (3D, length unit m)
    wp1: WorkPlane | quickplane = xz; unite = on
      pol2: Polygon "SkBaseOutRef" (disabled)
        type = open
        source = table
        table = {{0, 0}, {0.032, 0}, {0.032, 0.003}, {0.004, 0.003}, {0.004, 0.055}}
      pol4: Polygon "SkOuterBellHeight" (disabled) | type = open; source = table; table = {{0.004, 0.055}, {0.004, 0.155}}
      pol5: Polygon "SkCenterBellHeight" (disabled) | type = open; source = table; table = {{0, 0.055}, {0, 0.155}}
      pol6: Polygon "SkCenterStem" (disabled) | type = open; source = table; table = {{0, 0.055}, {0, 0}}
      pol7: Polygon "SkUpBell" (disabled) | type = open; source = table; table = {{0, 0.155}, {0.023, 0.155}}
      pol8: Polygon "SkBellDown" (disabled) | type = open; source = table; table = {{0.004, 0.055}, {0.032, 0.088}}
      pol9: Polygon "SkBellSide" (disabled) | type = open; source = table; table = {{0.023, 0.155}, {0.032, 0.088}}
      pol11: Polygon "SkInnerSide" (disabled) | type = open; source = table; table = {{0.0222, 0.155}, {0.0312, 0.088}}
      pol12: Polygon "SkBellDown 1" (disabled)
        type = open
        source = table
        table = {{0.004, 0.058}, {0.0312, 0.0879260442804}}
      cc1: CompositeCurve | type = solid
        cb1: CubicBezier "Cubic Bézier 1" | p = {{0.032, 0.032, 0.016, 0.012}, {0, 0.003, 0.003, 0.003}}
        cb2: CubicBezier "Cubic Bézier 2" | p = {{0.012, 0.004, 0.004, 0.004}, {0.003, 0.003, 0.006, 0.016}}
      cb1: CubicBezier "Cubic Bézier 1" | p = {{0.004, 0.004, 0, 0.0144510790706}, {0.016, 0.05, 0.062, 0.066}}
      cb2: CubicBezier "Cubic Bézier 2"
        p = {{0.0144510790706, 0.0270070843399, 0.032, 0.032}, {0.066, 0.069, 0.086, 0.094}}
      cb3: CubicBezier "Cubic Bézier 3" | p = {{0.032, 0.032, 0.032, 0.023}, {0.094, 0.102, 0.118, 0.155}}
      cb4: CubicBezier "Cubic Bézier 4" | p = {{0.0312, 0.0312, 0.0312, 0.022}, {0.094, 0.102, 0.118, 0.155}}
      cb5: CubicBezier "InnerBellSide"
        p = 
          {0.0133333333333 -0.0008, 0.026-0.0008, 0.032-0.0008, 0.032-0.0008}
          {0.066, 0.072, 0.088, 0.094}
      cb7: CubicBezier "InnerBellSide 1" | p = {{0.011, 0.026, 0.0312, 0.0312}, {0.067, 0.069, 0.088, 0.094}}
      qb2: QuadraticBezier "InnerBellFound 1" | p = {{0.011, 0.006, 0}, {0.067, 0.0661520138383, 0.0661520138383}}
      qb1: QuadraticBezier "InnerBellFound" | p = {{0.0125333333333, 0.006, 0}, {0.066, 0.062, 0.062}}
      cb6: CubicBezier "Cubic Bézier 6"
        p = {{0.022, 0.0217872131616, 0.022703718394, 0.023}, {0.155, 0.156, 0.156, 0.155}}
      pol13: Polygon | type = open; source = table; table = {{0, 0.0661520138383}, {0, 0}, {0.032, 0}}
      csol1: ConvertToSolid | input = cb1, cb2, cb3, cb4, cb6, cb7, cc1, pol13, qb2
    rev1: Revolve | workplane = wp1; input = wp1; angtype = full
    fin: Finalize "Form Union"

Materials
  mat1: Common "WineGlassMat" on all domains
    def "Basic"
      density = 2203
      poissonsratio = 0.17
      youngsmodulus = 73.1e9

Physics
  solid: SolidMechanics on domains 1, 2
    dependent variable u = {u, v, w}
    lemm1: LinearElasticModel "Linear Elastic Material 1" (default)
    free1: Free (default)
    init1: init "Initial Values 1" (default)
    fix1: Fixed "Fixed Constraint 1" on boundaries 3, 4, 30, 44
    disp1: Displacement2 "Prescribed Displacement 1" (disabled) on boundaries 3, 4, 30, 44 | Direction = {0, 0, 1}

Mesh
  mesh1 "Mesh 1" (physics-controlled)
    size: MeshSizeDefault | hauto = 2

Studies
  std1 "Study 1"
    eig: Eigenfrequency | neigs = 50; shift = 1000[Hz]; conrad = 1

Solver configurations
  sol1 "Solution 1" (study std1)
    v1: Variables "Dependent Variables 1"
    e1: Eigenvalue "Eigenvalue Solver 1" | eigvfunscale = maximum; eigvfunscaleparam = 1.8E-7
      dDef: Direct

Datasets
  dset1: Solution | solution = sol1

Evaluation groups
  std1EvgFrq: EvaluationGroup "Eigenfrequencies (Study 1)" | data = dset1
    gev1: EvalGlobal "Global Evaluation 1"
      expr = {freq*2*pi, imag(freq)/abs(freq), abs(freq)/imag(freq)/2}
      unit = {rad/s, 1, 1}
      descr = {Angular frequency, Damping ratio, Quality factor}
  std1mpf1: EvaluationGroup "Participation Factors (Study 1)" | data = dset1
    gev1: EvalGlobal "Global Evaluation 1"
      expr = {mpf1.pfLnormX, mpf1.pfLnormY, mpf1.pfLnormZ, mpf1.pfRnormX, mpf1.pfRnormY, mpf1.pfRnormZ, mpf1.mEffLX, mpf1.mEffLY, mpf1.mEffLZ, mpf1.mEffRX, mpf1.mEffRY, mpf1.mEffRZ}
      unit = {1, 1, 1, 1, 1, 1, kg, kg, kg, kg*m^2, kg*m^2, kg*m^2}
      descr = {"Participation factor, normalized, X-translation", "Participation factor, normalized, Y-translation", "Participation factor, normalized, Z-translation", "Participation factor, normalized, X-rotation", "Participation factor, normalized, Y-rotation", "Participation factor, normalized, Z-rotation", "Effective modal mass, X-translation", "Effective modal mass, Y-translation", "Effective modal mass, Z-translation", "Effective modal mass, X-rotation", "Effective modal mass, Y-rotation", "Effective modal mass, Z-rotation"}

Plots
  pg1: PlotGroup3D "Mode Shape (solid)" | data = dset1
    surf1: Surface | expr = solid.disp
      def: Deform "Deformation" | expr = {u, v, w}; descr = Displacement field

Exports
  anim1: Animation
    giffilename = /Users/pos17/MEGAsync/Polimi/Second Year/Musical Acoustics/HL1/ModeShape1.gif
    sweeptype = dde
    maxframes = 11
  anim2: Animation
    giffilename = /Users/pos17/MEGAsync/Polimi/Second Year/Musical Acoustics/HL1/MODESHAPEBOH.gif
    sweeptype = dde
    maxframes = 11
  anim3: Animation
    giffilename = /Users/pos17/MEGAsync/Polimi/Second Year/Musical Acoustics/HL1/ModeShape1188.gif
    sweeptype = dde
    maxframes = 11
  anim4: Animation | target = player; sweeptype = dde; maxframes = 11
  anim5: Animation
    giffilename = /Users/pos17/MEGAsync/Polimi/Second Year/Musical Acoustics/HL1/ModeShapePixar.gif
    sweeptype = dde
    maxframes = 11
  anim6: Animation | target = player; sweeptype = dde; maxframes = 11
  anim7: Animation | target = player; sweeptype = dde; maxframes = 11
  anim8: Animation | target = player; sweeptype = dde; maxframes = 11
  anim9: Animation | sweeptype = dde; maxframes = 11
  anim10: Animation | target = player; sweeptype = dde; maxframes = 11
  anim11: Animation
    giffilename = /Users/pos17/MEGAsync/Polimi/Second Year/Musical Acoustics/HL1/413_3Std.gif
    sweeptype = dde
    maxframes = 11
  anim12: Animation | target = player; sweeptype = dde; maxframes = 11
  anim13: Animation | target = player; sweeptype = dde; maxframes = 11
  anim14: Animation | target = player; sweeptype = dde; maxframes = 11
  anim15: Animation | target = player; sweeptype = dde; maxframes = 11
  anim16: Animation | target = player; sweeptype = dde; maxframes = 11
  anim17: Animation | target = player; sweeptype = dde; maxframes = 11
  anim18: Animation | target = player; sweeptype = dde; maxframes = 11
  anim19: Animation
    giffilename = /Users/pos17/MATLAB/Projects/MusicalAcoustics_HWs/HL1/LaMelanzana.gif
    sweeptype = dde
    maxframes = 11