// COMSOL Multiphysics 6.0.0.405 model "Glass2Axisym.mph"
// Outline of the model tree

Common definitions
  mpf1: ParticipationFactors

Geometry
  geom1 "Geometry 1" (2D axisymmetric, length unit m)
    imp1: Import
      type = native
      filename = /Users/pos17/MEGAsync/Polimi/Second Year/Musical Acoustics/HL1/Glass2PlaneGeometry.mphbin
      meshfilename = /Users/pos17/MEGAsync/Polimi/Second Year/Musical Acoustics/HL1/Glass2PlaneGeometry.mphbin
    fin: Finalize "Form Union"

Materials
  mat1: Common "WineGlassMat" on all domains
    def "Basic"
      density = 2203
      poissonsratio = 0.17
      youngsmodulus = 73.1e9

Physics
  solid: SolidMechanics on all domains
    dependent variable u = {u, v, w}
    Mode2Daxi.ModeExtension = 1
    lemm1: LinearElasticModel "Linear Elastic Material 1" (default)
    axi1: AxialSymmetrySolid "Axial Symmetry 1" (default)
    free1: Free (default)
    init1: init "Initial Values 1" (default)
    fix1: Fixed "Fixed Constraint 1" on boundaries 2

Mesh
  mesh1 "Mesh 1"
    size: MeshSizeDefault | hauto = 2
    ftri1: FreeTri "Free Triangular 1" on remaining entities

Studies
  std1 "Study 1"
    eig: Eigenfrequency | neigs = 20; shift = 500 [Hz]; conrad = 1; geometricNonlinearity = on

Solver configurations
  sol1 "Solution 1" (study std1)
    v1: Variables "Dependent Variables 1"
    e1: Eigenvalue "Eigenvalue Solver 1" | storelinpoint = on; eigvfunscale = maximum; eigvfunscaleparam = 1.59E-7
      dDef: Direct

Datasets
  dset1: Solution | solution = sol1
  rev1: Revolve2D "Revolution 2D 1" | data = dset1; startangle = -90; revangle = 225; modenumber = solid.mk

Evaluation groups
  std1EvgFrq: EvaluationGroup "Eigenfrequencies (Study 1)" | data = dset1
    gev1: EvalGlobal "Global Evaluation 1"
      expr = {freq*2*pi, imag(freq)/abs(freq), abs(freq)/imag(freq)/2}
      unit = {rad/s, 1, 1}
      descr = {Angular frequency, Damping ratio, Quality factor}
  std1mpf1: EvaluationGroup "Participation Factors (Study 1)" | data = dset1
    gev1: EvalGlobal "Global Evaluation 1"
      expr = {mpf1.pfLnormR, mpf1.pfLnormZ, mpf1.pfRnormZ, mpf1.mEffLR, mpf1.mEffLZ, mpf1.mEffRZ}
      unit = {1, 1, 1, kg, kg, kg*m^2}
      descr = {"Participation factor, normalized, R-translation", "Participation factor, normalized, Z-translation", "Participation factor, normalized, Z-rotation", "Effective modal mass, R-translation", "Effective modal mass, Z-translation", "Effective modal mass, Z-rotation"}

Plots
  pg1: PlotGroup2D "Mode Shape (solid)" | data = dset1
    surf1: Surface | expr = solid.disp
      def: Deform "Deformation" | expr = {u, w}; descr = Displacement field
  pg2: PlotGroup3D "Mode Shape, 3D (solid)" | data = rev1
    surf1: Surface | expr = solid.disp
      def: Deform "Deformation" | revcoordsys = cylindrical; expr = {u, v, w}; descr = Displacement field

Exports
  anim1: Animation | target = player; sweeptype = dde; maxframes = 11
  anim2: Animation | target = player; sweeptype = dde; maxframes = 11
  anim3: Animation | target = player; sweeptype = dde; maxframes = 11
  anim4: Animation | target = player; sweeptype = dde; maxframes = 11
  anim5: Animation
    giffilename = /Users/pos17/MEGAsync/Polimi/Second Year/Musical Acoustics/HL1/413_3AxiSym.gif
    sweeptype = dde
    maxframes = 11
  anim6: Animation | target = player; sweeptype = dde; maxframes = 11