// COMSOL Multiphysics 6.0.0.405 model "Trumpet2.mph"
// Outline of the model tree
// Components: comp1 "Component 1", comp2 "Component 2"

Parameters
  rT = 0.6[cm]  // Tube Radius
  rS = 2[m]  // Air Sphere Radius
  N = 255  // Number of Frequencies
  Lt = 1.37[m]  // Tube Length
  Lspace = 20[mm]  // Length empty Space
  LambdaMax = c0/fMax  // Wave Length Max Frequency
  fMin = 50[Hz]  // Min Frequency
  fMax = 1200[Hz]  // Max Frequency
  c0 = 343[m/s]  // Wave speed
  Lh = 0.2[m]  // Bell Length
  m = 28  // Bell Exponent
  St = rT^2*pi  // Surface Tube

Coordinate systems
  pml1: PML "Perfectly Matched Layer 1" [geom1] on domains 1
  pml2: PML "Perfectly Matched Layer 1" [geom2] on domains 1

Geometry
  geom1 "Geometry 1" [comp1] (2D axisymmetric, length unit m)
    c1: Circle "InternalBound" | pos = {0, rS+LambdaMax}; rot = -90; r = rS; angle = 180
    c2: Circle "External Bound" | pos = {0, rS+LambdaMax}; rot = -90; r = rS+LambdaMax; angle = 180
    dif1: Difference "PML layer" | input = c2; input2 = c1; keepsubtract = on
    ls1: LineSegment | specify1 = coord; coord1 = {rT, rS+LambdaMax}; specify2 = coord; coord2 = {rT, rS-Lt +LambdaMax}
    r1: Rectangle | pos = {0, rS+LambdaMax-Lt-Lspace}; size = {rT, Lspace}
    dif2: Difference "AirVolume" | input = c1; input2 = r1
    pt1: Point | p = {0, rS+LambdaMax-Lt}
    fin: Finalize "Form Union"
  geom2 "Geometry 2" [comp2] (2D axisymmetric, length unit m)
    c1: Circle "InternalBound" | pos = {0, rS+LambdaMax}; rot = -90; r = rS; angle = 180
    c2: Circle "External Bound" | pos = {0, rS+LambdaMax}; rot = -90; r = rS+LambdaMax; angle = 180
    dif1: Difference "PML layer" | input = c2; input2 = c1; keepsubtract = on
    ls1: LineSegment
      specify1 = coord
      coord1 = {rT, rS+LambdaMax-Lh}
      specify2 = coord
      coord2 = {rT, rS-Lt +LambdaMax-Lh}
    r1: Rectangle | pos = {0, rS+LambdaMax-Lt-Lspace-Lh}; size = {rT, Lspace}
    dif2: Difference "AirVolume" | input = c1; input2 = r1
    pt1: Point | p = {0, rS+LambdaMax-Lt-Lh}
    pc1: ParametricCurve | pos = {0, rS+LambdaMax-Lh}; parmax = Lh; coord = {sqrt((St/pi)*exp(m*s)), s}
    fin: Finalize "Form Union"

Materials
  mat1: Common "Air"
    def "Basic"
      thermalexpansioncoefficient = alpha_p(pA,T)
      molarmass = 0.02897[kg/mol]
      bulkviscosity = muB(T)
      relpermeability = 1
      relpermittivity = 1
      dynamicviscosity = eta(T)
      ratioofspecificheat = 1.4
      electricconductivity = 0[S/m]
      heatcapacity = Cp(T)
      density = rho(pA,T)
      thermalconductivity = k(T)
      soundspeed = cs(T)
      eta: Piecewise | arg = T; pieces = {200.0, 1600.0, -8.38278E-7+8.35717342E-8*T^1-7.69429583E-11*T^2+4.6437266E-14*T^3-1.06585607E-17*T^4}; argunit = K; fununit = Pa*s
      Cp: Piecewise | arg = T; pieces = {200.0, 1600.0, 1047.63657-0.372589265*T^1+9.45304214E-4*T^2-6.02409443E-7*T^3+1.2858961E-10*T^4}; argunit = K; fununit = J/(kg*K)
      rho: Analytic | expr = pA*0.02897/R_const[K*mol/J]/T; args = {pA, T}; fununit = kg/m^3; argunit = {Pa, K}
      k: Piecewise | arg = T; pieces = {200.0, 1600.0, -0.00227583562+1.15480022E-4*T^1-7.90252856E-8*T^2+4.11702505E-11*T^3-7.43864331E-15*T^4}; argunit = K; fununit = W/(m*K)
      cs: Analytic | expr = sqrt(1.4*R_const[K*mol/J]/0.02897*T); args = T; fununit = m/s; argunit = K
      an1: Analytic | funcname = alpha_p; expr = -1/rho(pA,T)*d(rho(pA,T),T); args = {pA, T}; fununit = 1/K; argunit = {Pa, K}
      an2: Analytic "Analytic 2a" | funcname = muB; expr = 0.6*eta(T); args = T; fununit = Pa*s; argunit = K
    RefractiveIndex
      n = 1
      ki = 0
    NonlinearModel
      BA = (def.gamma+1)/2
    idealGas
      Rs = R_const/Mn
      heatcapacity = Cp(T)
      ratioofspecificheat = 1.4
      molarmass = 0.02897
      Cp: Piecewise | arg = T; pieces = {200.0, 1600.0, 1047.63657-0.372589265*T^1+9.45304214E-4*T^2-6.02409443E-7*T^3+1.2858961E-10*T^4}; argunit = K; fununit = J/(kg*K)
  matlnk1: Link "Material Link 1" [comp1] on domains 1, 2
  matlnk2: Link "Material Link 2" [comp2] on all domains

Physics
  acpr: PressureAcoustics "Pressure Acoustics, Frequency Domain" [geom1] on all domains
    dependent variable p
    fpam1: FrequencyPressureAcousticsModel "Pressure Acoustics 1" (default)
    axi1: AxialSymmetry (default)
    shb1: SoundHard "Sound Hard Boundary (Wall) 1" (default)
    init1: init "Initial Values 1" (default)
    pr1: Pressure on boundaries 5 | p0 = 1.1 [Pa]
    ishb1: InteriorSoundHard "Interior Sound Hard Boundary (Wall) 1" on boundaries 9

Mesh
  mesh1 "Mesh 1" [geom1]
    size: MeshSizeDefault | hmax = LambdaMax/5; hgrad = 1.2; custom = on
    ftri1: FreeTri "Free Triangular 1" on remaining entities
  mesh2 "Mesh 2" [geom2]
    size: MeshSizeDefault | hmax = LambdaMax/5; hgrad = 1.2; custom = on
    ftri1: FreeTri "Free Triangular 1" on remaining entities

Studies
  std1 "Study 1"
    freq: Frequency "Frequency Domain" | plist = range(fMin,(fMax-fMin)/N,fMax)

Solver configurations
  sol1 "Solution 1" (study std1)
    v1: Variables "Dependent Variables 1"
    s1: Stationary "Stationary Solver 1"
      dDef: Direct
      p1: Parametric | pname = freq; plistarr = range(fMin,(fMax-fMin)/N,fMax); punit = Hz; pcontinuationmode = no
      fc1: FullyCoupled | linsolver = dDef

Datasets
  dset1: Solution | solution = sol1
  rev1: Revolve2D "Revolution 2D 1" | data = dset1; startangle = -90; revangle = 225

Plots
  pg1: PlotGroup2D "Acoustic Pressure (acpr)" | data = dset1
    surf1: Surface | expr = acpr.p_t
  pg2: PlotGroup2D "Sound Pressure Level (acpr)" | data = dset1
    surf1: Surface | expr = acpr.Lp_t
  pg3: PlotGroup3D "Acoustic Pressure, 3D (acpr)" | data = rev1
    surf1: Surface | expr = acpr.p_t
  pg4: PlotGroup3D "Sound Pressure Level, 3D (acpr)" | data = rev1
    surf1: Surface | expr = acpr.Lp_t