// COMSOL Multiphysics 6.0.0.405 model "Trumpet5.mph"
// Outline of the model tree
// Components: comp1 "Component 1 Tube", comp2 "Component 2 Tube Bell", comp3 "Component 3 MouthPiece", comp4 "Component 4 Trumpet"

Parameters
  rT = 0.6[cm]  // Tube Radius
  rS = 2[m]  // Air Sphere Radius
  N = 255  // Number of Frequencies
  Lt = 1.37[m]  // Tube Length
  Lspace = 20[mm]  // Length empty Space
  LambdaMax = c0/fMax  // Wave Length Max Frequency
  fMin = 50[Hz]  // Min Frequency
  fMax = 1200[Hz]  // Max Frequency
  c0 = 343[m/s]  // Wave speed
  Lh = 0.2[m]  // Bell Length
  m = 28  // Bell Exponent
  St = rT^2*pi  // Surface Tube
  rM = rT+0.3[cm]  // MouthPieceRadius
  Lm = 10[cm]  // lengthMouthpiece
  rSMP = rS/2  // AirSphere Radius MouthPiece
  MPH = sqrt(rM^2-(rT/8)^2)

Variables
  var2 "Variables 2" [comp1]
    Press_Tube = p
    Vel_Tube = acpr.vz
  var3 "Variables 2" [comp2]
    Press_TubeBell = p
    Vel_TubeBell = acpr2.vz
  var4 "Variables 2" [comp3]
    Press_MouthPiece = p
    Vel_MouthPiece = acpr3.vz
  var5 "Variables 2" [comp4]
    Press_Trumpet = p
    Vel_Trumpet = acpr4.vz

Couplings
  intop1: Integration on boundaries 5 | axisym = on
  intop2: Integration on boundaries 5 | axisym = on
  intop3: Integration on boundaries 5 | axisym = on
  intop4: Integration on boundaries 5 | axisym = on

Coordinate systems
  pml1: PML "Perfectly Matched Layer 1" [geom1] on domains 1 | ScalingType = Spherical
  pml2: PML "Perfectly Matched Layer 1" [geom2] on domains 1
  pml4: PML "Perfectly Matched Layer 4" [geom4] on domains 1

Geometry
  geom1 "Geometry 1" [comp1] (2D axisymmetric, length unit m)
    c1: Circle "InternalBound" | rot = -90; r = rS; angle = 180
    c2: Circle "External Bound" | rot = -90; r = rS+LambdaMax; angle = 180
    dif1: Difference "PML layer" | input = c2; input2 = c1; keepsubtract = on
    ls1: LineSegment | specify1 = coord; coord1 = {rT, 0}; specify2 = coord; coord2 = {rT, -Lt}
    r1: Rectangle | pos = {0, -Lt-Lspace}; size = {rT, Lspace}
    dif2: Difference "AirVolume" | input = c1; input2 = r1
    pt1: Point | p = {0, -Lt}
    ls2: LineSegment | vertex1 = ls1(1) points 1; vertex2 = dif2(1) points 4
    fin: Finalize "Form Union"
  geom2 "Geometry 2" [comp2] (2D axisymmetric, length unit m)
    c1: Circle "InternalBound" | rot = -90; r = rS; angle = 180
    c2: Circle "External Bound" | rot = -90; r = rS+LambdaMax; angle = 180
    dif1: Difference "PML layer" | input = c2; input2 = c1; keepsubtract = on
    ls1: LineSegment | specify1 = coord; coord1 = {rT, -Lh}; specify2 = coord; coord2 = {rT, -Lt-Lh}
    r1: Rectangle | pos = {0, -Lt-Lspace-Lh}; size = {rT, Lspace}
    dif2: Difference "AirVolume" | input = c1; input2 = r1
    pt1: Point | p = {0, -Lt-Lh}
    pc1: ParametricCurve | pos = {0, -Lh}; parmax = Lh; coord = {sqrt((St/pi)*exp(m*s)), s}
    ls2: LineSegment
      specify1 = coord
      vertex1 = pc1(1) points 1
      coord1 = {rT, -Lh}
      specify2 = coord
      vertex2 = dif2(1) points 4
      coord2 = {0, -Lh}
    ls3: LineSegment | vertex1 = pc1(1) points 2; coord1 = {rT, -Lh}; vertex2 = dif2(1) points 4; coord2 = {0, -Lh}
    fin: Finalize "Form Union"
  geom3 "Geometry 2" [comp3] (2D axisymmetric, length unit m)
    c1: Circle "InternalBound" | rot = -90; r = rSMP; angle = 180
    c2: Circle "External Bound" | rot = -90; r = rSMP+LambdaMax; angle = 180
    dif1: Difference "PML layer" | input = c2; input2 = c1; keepsubtract = on
    ls1: LineSegment | specify1 = coord; coord1 = {rT, 0}; specify2 = coord; coord2 = {rT/8, -Lm}
    pt2: Point | p = {rT/8, -Lm}
    pt3: Point | p = {rM, -Lm-MPH}
    ca1: CircularArc
      specify = endsr
      center = {0, -0.108968695557}
      r = rM
      point1 = {rM, -Lm-MPH}
      point2 = {rT/8, -Lm}
      angle2 = 85.2198081528
    r1: Rectangle | pos = {0, -Lm-MPH-Lspace}; size = {rM, Lspace}
    dif2: Difference "AirVolume" | input = c1; input2 = r1
    pt1: Point | p = {0, -Lt-Lh}
    ls2: LineSegment | vertex1 = ls1(1) points 1; coord1 = {rT, -Lh}; vertex2 = dif2(1) points 4; coord2 = {0, -Lh}
    fin: Finalize "Form Union"
  geom4 "Geometry 4" [comp4] (2D axisymmetric, length unit m)
    c1: Circle "InternalBound" | rot = -90; r = rS; angle = 180
    c2: Circle "External Bound" | rot = -90; r = rS+LambdaMax; angle = 180
    dif1: Difference "PML layer" | input = c2; input2 = c1; keepsubtract = on
    ls1: LineSegment | specify1 = coord; coord1 = {rT, -Lh}; specify2 = coord; coord2 = {rT, -Lh-Lt}
    pc1: ParametricCurve | pos = {0, -Lh}; parmax = Lh; coord = {sqrt((St/pi)*exp(m*s)), s}
    ls2: LineSegment | specify1 = coord; coord1 = {rT, -Lh -Lt}; specify2 = coord; coord2 = {rT/8, -Lm -Lt-Lh}
    ca1: CircularArc
      specify = endsr
      center = {0, -1.67896869556}
      r = rM
      point1 = {rM, -Lm-MPH-Lt-Lh}
      point2 = {rT/8, -Lm-Lt-Lh}
      angle2 = 85.2198081528
    pt2: Point | p = {0, -Lt-Lh}
    r2: Rectangle | pos = {0, -Lm-MPH-Lspace-Lt-Lh}; size = {rM, Lspace}
    dif3: Difference "AirVolume 1" | input = c1; input2 = r2
    ls3: LineSegment
      specify1 = coord
      vertex1 = pc1(1) points 1
      coord1 = {rT, -Lh -Lt}
      specify2 = coord
      coord2 = {0, -Lh -Lt}
    ls4: LineSegment
      specify1 = coord
      vertex1 = pc1(1) points 1
      coord1 = {rT, -Lh}
      specify2 = coord
      coord2 = {0, -Lh}
    ls5: LineSegment | vertex1 = dif3(1) points 4; coord1 = {rT, -Lh}; vertex2 = pc1(1) points 2; coord2 = {0, -Lh}
    fin: Finalize "Form Union"

Materials
  mat1: Common "Air"
    def "Basic"
      thermalexpansioncoefficient = alpha_p(pA,T)
      molarmass = 0.02897[kg/mol]
      bulkviscosity = muB(T)
      relpermeability = 1
      relpermittivity = 1
      dynamicviscosity = eta(T)
      ratioofspecificheat = 1.4
      electricconductivity = 0[S/m]
      heatcapacity = Cp(T)
      density = rho(pA,T)
      thermalconductivity = k(T)
      soundspeed = cs(T)
      eta: Piecewise | arg = T; pieces = {200.0, 1600.0, -8.38278E-7+8.35717342E-8*T^1-7.69429583E-11*T^2+4.6437266E-14*T^3-1.06585607E-17*T^4}; argunit = K; fununit = Pa*s
      Cp: Piecewise | arg = T; pieces = {200.0, 1600.0, 1047.63657-0.372589265*T^1+9.45304214E-4*T^2-6.02409443E-7*T^3+1.2858961E-10*T^4}; argunit = K; fununit = J/(kg*K)
      rho: Analytic | expr = pA*0.02897/R_const[K*mol/J]/T; args = {pA, T}; fununit = kg/m^3; argunit = {Pa, K}
      k: Piecewise | arg = T; pieces = {200.0, 1600.0, -0.00227583562+1.15480022E-4*T^1-7.90252856E-8*T^2+4.11702505E-11*T^3-7.43864331E-15*T^4}; argunit = K; fununit = W/(m*K)
      cs: Analytic | expr = sqrt(1.4*R_const[K*mol/J]/0.02897*T); args = T; fununit = m/s; argunit = K
      an1: Analytic | funcname = alpha_p; expr = -1/rho(pA,T)*d(rho(pA,T),T); args = {pA, T}; fununit = 1/K; argunit = {Pa, K}
      an2: Analytic "Analytic 2a" | funcname = muB; expr = 0.6*eta(T); args = T; fununit = Pa*s; argunit = K
    RefractiveIndex
      n = 1
      ki = 0
    NonlinearModel
      BA = (def.gamma+1)/2
    idealGas
      Rs = R_const/Mn
      heatcapacity = Cp(T)
      ratioofspecificheat = 1.4
      molarmass = 0.02897
      Cp: Piecewise | arg = T; pieces = {200.0, 1600.0, 1047.63657-0.372589265*T^1+9.45304214E-4*T^2-6.02409443E-7*T^3+1.2858961E-10*T^4}; argunit = K; fununit = J/(kg*K)
  matlnk1: Link "Material Link 1" [comp1] on domains 1-3
  matlnk2: Link "Material Link 2" [comp2] on all domains
  matlnk3: Link "Material Link 2" [comp3] on all domains
  matlnk4: Link "Material Link 4" [comp4] on all domains

Physics
  acpr: PressureAcoustics "Tube" [geom1] on all domains
    dependent variable p
    fpam1: FrequencyPressureAcousticsModel "Pressure Acoustics 1" (default)
    axi1: AxialSymmetry (default)
    shb1: SoundHard "Sound Hard Boundary (Wall) 1" (default)
    init1: init "Initial Values 1" (default)
    ishb1: InteriorSoundHard "Interior Sound Hard Boundary (Wall) 1" on boundaries 10
    port1: Port on boundaries 5 | PortType = Circular; p = 1.1; pamp = 1.1
  acpr2: PressureAcoustics "TubeBell Acoustics, Frequency Domain" [geom2] on all domains
    dependent variable p
    fpam1: FrequencyPressureAcousticsModel "Pressure Acoustics 1" (default)
      FluidModel = FrequencyLinearElastic
      C1 = 0.0978
      C2 = 0.7
      C3 = 0.189
      C4 = 0.595
      C5 = 0.0571
      C6 = 0.754
      C7 = 0.087
      C8 = 0.732
      sv = 1
      Lv = sqrt(((acpr2.mu*acpr2.tau)*8)/(acpr2.Rf*acpr2.epsilon_p))
      Lth = 2*acpr2.Lv
      tau = 1
      pH = 8
      gasConstantType = specificGC
      CpOrGammaOption = Cp
      LinearElasticOption = crho
      AttenuationType = neperperm
      Constants = DelanyBazley
      DuctType = WideDuct
      PorousApproximation = Limp
      ViscousLengthOption = sv
      FluidMaterial = dommat
      SolidMaterial = dommat
    axi1: AxialSymmetry (default)
    shb1: SoundHard "Sound Hard Boundary (Wall) 1" (default)
    init1: init "Initial Values 1" (default)
    ishb1: InteriorSoundHard "Interior Sound Hard Boundary (Wall) 1" on boundaries 12, 17
    port1: Port on boundaries 5
  acpr3: PressureAcoustics "TubeBell Acoustics, Frequency Domain" [geom3] on all domains
    dependent variable p
    fpam1: FrequencyPressureAcousticsModel "Pressure Acoustics 1" (default)
      FluidModel = FrequencyLinearElastic
      C1 = 0.0978
      C2 = 0.7
      C3 = 0.189
      C4 = 0.595
      C5 = 0.0571
      C6 = 0.754
      C7 = 0.087
      C8 = 0.732
      sv = 1
      Lv = sqrt(((acpr3.mu*acpr3.tau)*8)/(acpr3.Rf*acpr3.epsilon_p))
      Lth = 2*acpr3.Lv
      tau = 1
      pH = 8
      gasConstantType = specificGC
      CpOrGammaOption = Cp
      LinearElasticOption = crho
      AttenuationType = neperperm
      Constants = DelanyBazley
      DuctType = WideDuct
      PorousApproximation = Limp
      ViscousLengthOption = sv
      FluidMaterial = dommat
      SolidMaterial = dommat
    axi1: AxialSymmetry (default)
    shb1: SoundHard "Sound Hard Boundary (Wall) 1" (default)
    init1: init "Initial Values 1" (default)
    ishb1: InteriorSoundHard "Interior Sound Hard Boundary (Wall) 1" on boundaries 9, 15
    port1: Port on boundaries 5
  acpr4: PressureAcoustics "FullTrumpet Acoustics, Frequency Domain" [geom4] on all domains
    dependent variable p
    fpam1: FrequencyPressureAcousticsModel "Pressure Acoustics 1" (default)
      FluidModel = FrequencyLinearElastic
      C1 = 0.0978
      C2 = 0.7
      C3 = 0.189
      C4 = 0.595
      C5 = 0.0571
      C6 = 0.754
      C7 = 0.087
      C8 = 0.732
      sv = 1
      Lv = sqrt(((acpr4.mu*acpr4.tau)*8)/(acpr4.Rf*acpr4.epsilon_p))
      Lth = 2*acpr4.Lv
      tau = 1
      pH = 8
      gasConstantType = specificGC
      CpOrGammaOption = Cp
      LinearElasticOption = crho
      AttenuationType = neperperm
      Constants = DelanyBazley
      DuctType = WideDuct
      PorousApproximation = Limp
      ViscousLengthOption = sv
      FluidMaterial = dommat
      SolidMaterial = dommat
    axi1: AxialSymmetry (default)
    shb1: SoundHard "Sound Hard Boundary (Wall) 1" (default)
    init1: init "Initial Values 1" (default)
    ishb1: InteriorSoundHard "Interior Sound Hard Boundary (Wall) 1" on boundaries 13, 14, 20, 21
    port1: Port on boundaries 5

Mesh
  mesh1 "Mesh 1" [geom1]
    size: MeshSizeDefault | hmax = LambdaMax/5; hgrad = 1.2; custom = on
    ftri1: FreeTri "Free Triangular 1" on domains 2, 3
    map1: Map "Mapped 1" on domains 1 | smoothmaxiter = 5; smoothmaxdepth = 5
  mesh2 "Mesh 2" [geom2]
    size: MeshSizeDefault | hmax = LambdaMax/5; hgrad = 1.2; custom = on
    ftri1: FreeTri "Free Triangular 1" on domains 2-4
    map1: Map "Mapped 1" on domains 1 | smoothmaxiter = 5; smoothmaxdepth = 5
  mesh3 "Mesh 2" [geom3]
    size: MeshSizeDefault | hmax = LambdaMax/5; hmin = 0.00137; hcurve = 0.3; hgrad = 1.2; custom = on
    ftri1: FreeTri "Free Triangular 1" on domains 2, 3
    map1: Map "Mapped 1" on domains 1 | smoothmaxiter = 5; smoothmaxdepth = 5
  mesh4 "Mesh 4" [geom4]
    size: MeshSizeDefault | hmax = LambdaMax/5; hgrad = 1.2
    ftri1: FreeTri "Free Triangular 1" on domains 2-5
    map1: Map "Mapped 1" on domains 1 | smoothmaxiter = 5; smoothmaxdepth = 5

Studies
  std1 "Study 1 Tube"
    freq: Frequency "Frequency Domain" | plist = range(fMin,(fMax-fMin)/N,fMax); solve for = {acpr}
  std2 "Study 2 Tube Bell"
    freq: Frequency "Frequency Domain" | plist = range(fMin,(fMax-fMin)/N,fMax); solve for = {acpr2, acpr3, acpr4}
  std3 "Study 3"
    freq: Frequency "Frequency Domain" | plist = range(fMin,(fMax-fMin)/N,fMax); solve for = {acpr3, acpr4}
  std4 "Study 4"
    freq: Frequency "Frequency Domain" | plist = range(fMin,(fMax-fMin)/N,fMax); solve for = {acpr4}
  std5 "Study 5"
    ref: StudyReference | studyref = std1
    ref2: StudyReference | studyref = std2
    ref3: StudyReference "Study 3 MouthPiece" | studyref = std3
    ref4: StudyReference "Study 4 Trumpet" | studyref = std4

Solver configurations
  sol1 "Solution 1" (study std1)
    v1: Variables "Dependent Variables 1"
    s1: Stationary "Stationary Solver 1"
      dDef: Direct
      p1: Parametric | pname = freq; plistarr = range(fMin,(fMax-fMin)/N,fMax); punit = Hz; pcontinuationmode = no
      fc1: FullyCoupled | linsolver = dDef
  sol2 "Solution 2" (study std2)
    // same settings as sol1
  sol3 "Solution 3" (study std3)
    // same settings as sol1
  sol4 "Solution 4" (study std4)
    // same settings as sol1
  sol5 "Solution 5" (study std5)
    copy1: CopySolution

Datasets
  dset1: Solution | solution = sol1
  rev1: Revolve2D "Revolution 2D 1" | data = dset1; startangle = -90; revangle = 225
  dset2: Solution | solution = sol2
  dset3: Solution | solution = sol2
  rev2: Revolve2D "Revolution 2D 2" | data = dset3; startangle = -90; revangle = 225
  dset4: Solution | solution = sol3
  dset5: Solution | solution = sol3
  dset6: Solution | solution = sol3
  rev3: Revolve2D "Revolution 2D 3" | data = dset6; startangle = -90; revangle = 225
  dset7: Solution | solution = sol4
  dset8: Solution | solution = sol4
  dset9: Solution | solution = sol4
  dset10: Solution | solution = sol4
  rev4: Revolve2D "Revolution 2D 4" | data = dset10; startangle = -90; revangle = 225
  dset11: Solution | solution = sol5
  dset12: Solution | solution = sol5
  dset13: Solution | solution = sol5
  dset14: Solution | solution = sol5

Derived values
  int1: IntLine "impedanceTubeLog" on boundaries 5
    data = dset1
    table = new
    expr = 20*log10(acpr.p_t_rms)/20*log10(acpr.v_rms)
    intsurface = on
  int2: IntLine "impedanceTubeLog 1" on boundaries 5
    data = dset3
    table = new
    expr = 20*log10(acpr2.p_t_rms)/20*log10(acpr2.v_rms)
  int3: IntLine "impedanceTubeLog 1.1" on boundaries 5
    data = dset6
    table = new
    expr = 20*log10(acpr3.p_t_rms)/20*log10(acpr3.v_rms)
  int4: IntLine "impedanceTubeLog 1.1.1" on boundaries 5
    data = dset10
    table = new
    expr = 20*log10(acpr4.p_t_rms)/20*log10(acpr4.v_rms)

Tables
  tbl1: Table
    freq (Hz) | |Z_in Tube|,
    50 | 31.05
    54.5098 | 33.0839
    59.0196 | 36.7524
    63.5294 | 41.9647
    68.0392 | 34.6839
    72.549 | 32.0371
    77.0588 | 30.3226
    81.5686 | 29.0001
    86.0784 | 27.8755
    90.5882 | 26.8509
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  tbl2: Table
    freq (Hz) | |Z_in Tube_Bell|
    50 | 31.5217
    54.5098 | 33.8901
    59.0196 | 39.0786
    63.5294 | 38.0225
    68.0392 | 33.5331
    72.549 | 31.2995
    77.0588 | 29.7404
    81.5686 | 28.4882
    86.0784 | 27.3917
    90.5882 | 26.3669
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  tbl3: Table
    freq (Hz) | |Z_in MouthPiece|
    50 | 28.6371
    54.5098 | 29.0203
    59.0196 | 29.3744
    63.5294 | 29.7039
    68.0392 | 30.0121
    72.549 | 30.3019
    77.0588 | 30.5756
    81.5686 | 30.8352
    86.0784 | 31.0823
    90.5882 | 31.3182
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  tbl4: Table
    freq (Hz) | |Z_in Trumpet|
    50 | 36.6953
    54.5098 | 39.5639
    59.0196 | 52.8764
    63.5294 | 38.343
    68.0392 | 34.6991
    72.549 | 31.9161
    77.0588 | 29.0121
    81.5686 | 24.7057
    86.0784 | 18.8976
    90.5882 | 25.7833
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
Plots
  pg1: PlotGroup2D "Acoustic Pressure (acpr)" | data = dset1
    surf1: Surface | expr = acpr.p_t
  pg2: PlotGroup2D "Sound Pressure Level (acpr)" | data = dset1
    surf1: Surface | expr = acpr.Lp_t
  pg3: PlotGroup3D "Acoustic Pressure, 3D (acpr)" | data = rev1
    surf1: Surface | expr = acpr.p_t
  pg4: PlotGroup3D "Sound Pressure Level, 3D (acpr)" | data = rev1
    surf1: Surface | expr = acpr.Lp_t
  pg5: PlotGroup2D "Acoustic Pressure (acpr2)" | data = dset3
    surf1: Surface | expr = acpr2.p_t
  pg6: PlotGroup2D "Sound Pressure Level (acpr2)" | data = dset3
    surf1: Surface | expr = acpr2.Lp_t
  pg7: PlotGroup3D "Acoustic Pressure, 3D (acpr2)" | data = rev2
    surf1: Surface | expr = acpr2.p_t
  pg8: PlotGroup3D "Sound Pressure Level, 3D (acpr2)" | data = rev2
    surf1: Surface | expr = acpr2.Lp_t
  pg9: PlotGroup2D "Acoustic Pressure (acpr3)" | data = dset6
    surf1: Surface | expr = acpr3.p_t
  pg10: PlotGroup2D "Sound Pressure Level (acpr3)" | data = dset6
    surf1: Surface | expr = acpr3.Lp_t
  pg11: PlotGroup3D "Acoustic Pressure, 3D (acpr3)" | data = rev3
    surf1: Surface | expr = acpr3.p_t
  pg12: PlotGroup3D "Sound Pressure Level, 3D (acpr3)" | data = rev3
    surf1: Surface | expr = acpr3.Lp_t
  pg13: PlotGroup2D "Acoustic Pressure (acpr4)" | data = dset10
    surf1: Surface | expr = acpr4.p_t
  pg14: PlotGroup2D "Sound Pressure Level (acpr4)" | data = dset14
    surf1: Surface | expr = acpr4.Lp_t
  pg15: PlotGroup3D "Acoustic Pressure, 3D (acpr4)" | data = rev4
    surf1: Surface | expr = acpr4.p_t
  pg16: PlotGroup3D "Sound Pressure Level, 3D (acpr4)" | data = rev4
    surf1: Surface | expr = acpr4.Lp_t
  pg17: PlotGroup1D "Z Input" | data = none; xlabel = freq (Hz); ylabel = |Z in|; manualgrid = on
    glob1: Global "Impedance Tube"
      data = dset1
      expr = {10*log10(abs(intop1(Press_Tube)/intop1(Vel_Tube))), }
      descr = {|Z_in Tube|, }
    glob2: Global "Impedance Tube Bell"
      data = dset3
      expr = 10*log10(abs(intop2(Press_TubeBell)/intop2(Vel_TubeBell)))
      descr = |Z_in Tube_Bell|
    glob3: Global "Impedance MouthPiece"
      data = dset6
      expr = 10*log10(abs(intop3(Press_MouthPiece)/intop3(Vel_MouthPiece)))
      descr = |Z_in MouthPiece|
    glob4: Global "Impedance Trumpet"
      data = dset10
      expr = 10*log10(abs(intop4(Press_Trumpet)/intop4(Vel_Trumpet)))
      descr = |Z_in Trumpet|

Exports
  tbl1: Table | table = tbl1; filename = /Users/pos17/MATLAB/Projects/MusicalAcoustics_HWs/HL4/Plots/Zin_Tube.csv
  tbl2: Table | table = tbl2; filename = /Users/pos17/MATLAB/Projects/MusicalAcoustics_HWs/HL4/Plots/Zin_TubeBell.csv
  tbl3: Table | table = tbl3; filename = /Users/pos17/MATLAB/Projects/MusicalAcoustics_HWs/HL4/Plots/Zin_Mouthpiece.csv
  tbl4: Table | table = tbl4; filename = /Users/pos17/MATLAB/Projects/MusicalAcoustics_HWs/HL4/Plots/Zin_Trumpet.csv