// COMSOL Multiphysics 6.0.0.405 model "SprucePlate.mph"
// Outline of the model tree

Parameters
  xp = 0.05[m]
  yp = 0.05[m]
  E_L = 12 [GPa]
  E_R = .9[GPa]
  E_T = 5[GPa]
  G_LR = .7[GPa]
  G_LT = .7[GPa]
  G_TR = .04[GPa]
  nu_LR = .37
  nu_LT = .47
  nu_TR = .43

Geometry
  geom1 "Geometry 1" (3D, length unit m)
    blk1: Block | size = {1, 1.4, 0.01}
    pt1: Point | p = {xp, yp, 0.01}
    fin: Finalize "Form Union"

Materials
  mat1: Common "Sitka Spruce" on all domains
    def "Basic"
      density = 370
    Orthotropic
      Evector = {E_L, E_T, E_R}
      nuvector = {nu_LT, nu_TR, nu_LR}
      Gvector = {G_LT, G_TR, G_LR}
      eta_Evector = {0, 0, 0}
      eta_Gvector = {0, 0, 0}

Physics
  solid: SolidMechanics on domains 1
    dependent variable u = {u, v, w}
    lemm1: LinearElasticModel "Linear Elastic Material 1" (default) | SolidModel = Orthotropic
    free1: Free (default)
    init1: init "Initial Values 1" (default)
    fix1: Fixed "Fixed Constraint 1" on boundaries 1, 2, 5, 6
    pl1: PointLoad on points 5 | Fp = {0, 0, -1}

Mesh
  mesh1 "Mesh 1"
    size: MeshSizeDefault | hmax = 0.14; hmin = 0.0252; hcurve = 0.6
    ftri1: FreeTri "Free Triangular 1" (disabled) on boundaries 4
    swe1: Sweep "Swept 1" on domains 1
      size1: Size on entire geometry | hmax = 0.01
    ftet1: FreeTet "Free Tetrahedral 1" (disabled) on remaining entities

Studies
  std1 "Study 1"
    param: Parametric "Parametric Sweep" (disabled)
      sweeptype = filled
      pname = {xp, yp}
      plistarr = {range(0.05,0.1,0.45), range(0.05,0.1,0.65)}
      punit = {m, m}
    freq: Frequency "Frequency Domain" | plist = range(300,10,800)

Solver configurations
  sol1 "Solution 1" (study std1)
    v1: Variables "Dependent Variables 1"
    s1: Stationary "Stationary Solver 1"
      p1: Parametric | pname = freq; plistarr = range(300,10,800); punit = Hz; pcontinuationmode = no
      fc1: FullyCoupled | linsolver = d1
      d1: Direct "Suggested Direct Solver (solid)" | linsolver = pardiso; pivotperturb = 1.0E-9
  sol4 "Parametric Solutions 2" (study std1)

Datasets
  dset1: Solution | solution = sol1
  dset3: Solution | solution = sol4

Plots
  pg3: PlotGroup1D "1D Plot Group 3" | data = dset3
    ptgr1: PointGraph on points 5 | expr = 20*log10(abs(solid.F_Pz/solid.uAmp_tZ)); descr = Z_in
  pg5: PlotGroup3D "Point Loads (solid) 1" | data = dset3
    arpt1: ArrowPoint "Point Load 1" | data = dset3; expr = {solid.pl1.F_Px, solid.pl1.F_Py, solid.pl1.F_Pz}
      col: Color "Color Expression" | expr = solid.pl1.F_P_Mag
      def: Deform "Deformation" | expr = {u, v, w}; descr = Displacement field
    surf1: Surface "Gray Surfaces" | expr = 1
      def: Deform "Deformation" | expr = {u, v, w}; descr = Displacement field
      sel1: Selection on boundaries 1-6
      tran1: Transparency | transparency = 0.8
  pg6: PlotGroup3D "Stress (solid)" | data = dset1
    vol1: Volume | expr = solid.vel_peak; descr = Velocity magnitude, peak
      def: Deform "Deformation" | expr = {u, v, w}; descr = Displacement field
  pg4: PlotGroup3D "Stress (solid) 1" | data = dset3
    vol1: Volume | expr = solid.vel_peak; descr = Velocity magnitude, peak
      def: Deform "Deformation" | expr = {u, v, w}; descr = Displacement field
  pg7: PlotGroup3D "Point Loads (solid)" | data = dset1
    arpt1: ArrowPoint "Point Load 1" | expr = {solid.pl1.F_Px, solid.pl1.F_Py, solid.pl1.F_Pz}
      col: Color "Color Expression" | expr = solid.pl1.F_P_Mag
      def: Deform "Deformation" | expr = {u, v, w}; descr = Displacement field
    surf1: Surface "Gray Surfaces" | expr = 1
      def: Deform "Deformation" | expr = {u, v, w}; descr = Displacement field
      sel1: Selection on boundaries 1-6
      tran1: Transparency | transparency = 0.8